### LAMMPS Input File - Convert periodic bulk into a slab that is still periodic in XY
# From MDToolkit template file: bulk_to_slab.in

## Configuration Variables
# FILL IN {{FIELDS}}

# File name of the initial LAMMPS data file
variable    START_DATA string {{"file"}}

# Amount of box expansion for zlo and zhi boundaries
variable    DELTA_ZLO equal {{float}}
variable    DELTA_ZHI equal {{float}}

## Initialization

units           real
atom_style      full
boundary        p p p
pair_style      lj/cut/coul/long 10 10
pair_modify     mix arithmetic
pair_modify     tail no
special_bonds   amber
bond_style      harmonic
angle_style     harmonic
dihedral_style  opls
improper_style  none

## Read initial data file

read_data      	${START_DATA}

## Neighbor parameters and force field coefficients

neighbor        2.0 bin
neigh_modify    delay 0
kspace_style    pppm 1e-5
kspace_modify   order 4

## Slab conversion

# Reduce atom image flags back down to 0 or +/- 1 (straddlers)
reset_atoms image all
# Write temporary dump file containing the unwrapped coordinates
write_dump all custom unwrapped_temp.dump id xu yu zu
# Change box size and boundary condition
change_box all z final $(zlo - v_DELTA_ZLO) $(zhi + v_DELTA_ZHI) boundary p p f
# Read the temporary dump file and overwrite the real atom coordinates using the unwrapped coordinates
read_dump unwrapped_temp.dump 0 x y z box no replace yes
# Turn on slab correction for PPPM solver
kspace_modify slab 3.0

## Write resulting data file

write_data	slab.data
