### LAMMPS Input File - Simulation of droplet on PTFE surface
# From MDToolkit template file: droplet_ptfe.in

## Configuration Variables
# FILL IN {{FIELDS}}
# IF YOU ARE RESTARTING A RUN WITHIN THE SAME DIRECTORY, RENAME YOUR LOG FILES SO THEY DON'T GET OVERWRITTEN

# Is this a restart? (true if starting from a binary restart file, false if starting from a data text file)
variable    IS_RESTART equal {{true/false}}
# File name of the binary restart file or initial data text file
# For restart files, using the * wildcard will find the largest-numbered restart file in the directory (ex: restart_*.rs)
variable    START_DATA string {{file}}

# Does droplet include salt ions? (true for saline, false for pure water)
variable    IS_SALTED equal {{true/false}}

# Thermostat temperature in degrees Celsius (25.0, 50.0, 80.0)
variable	TEMP_C equal {{T}}

# Number of time steps to run; try 200000 (200k steps == 0.4 ns if time step size is 2 fs)
variable	STEPS equal {{N}}
# Frequency of creating dump files (every N steps); try 1000
variable	DUMP_FREQ equal {{N}}
# Frequency of writing thermo output to the LAMMPS log file (every N steps); try 100
variable	THERMO_FREQ equal {{N}}
# Frequency of writing restart files (every N steps); try ~2 restarts per day of wall time
variable	RESTART_FREQ equal {{N}}

# Approximate center coordinates and slightly oversized radius of the droplet (in box units)
variable    DROP_X equal {{N}}
variable    DROP_Y equal {{N}}
variable    DROP_Z equal {{N}}
variable    DROP_R equal {{N}}

## Initialization

units           real
atom_style      full
boundary        p p p
pair_style      lj/cut/coul/long 10 10
pair_modify     mix arithmetic
pair_modify     tail no
special_bonds   amber
bond_style      harmonic
angle_style     harmonic
dihedral_style  opls
improper_style  none

## Read an initial data file or a restart file

if "${IS_RESTART}" then &
    "read_restart   ${START_DATA}" &
else &
    "read_data      ${START_DATA}"

## Variables with auto-calculated values

# Thermostat temperature in degrees Kelvin
variable    TEMP_K equal $(v_TEMP_C + 273.15)

## Neighbor parameters and force field coefficients

neighbor        2.0 bin
neigh_modify    delay 0
kspace_style    pppm 1e-5
kspace_modify   order 4

## Load balancing

balance 1.0 shift xyz 10 1.01

## Define spherical region to approximate which atoms are part of the droplet and which atoms are vapor

region      REGION_LIQUID sphere $(v_DROP_X) $(v_DROP_Y) $(v_DROP_Z) $(v_DROP_R) side in units box
region		REGION_VAPOR sphere $(v_DROP_X) $(v_DROP_Y) $(v_DROP_Z) $(v_DROP_R) side out units box

## Define atom/molecule groups

group           PTFE type 1 2 3

# The pure water droplet data and the saline droplet data do not have the same atom type IDs
if "${IS_SALTED}" then &
    "group      CHLORINE type 4" &
    "group      SODIUM type 5" &
    "group      H2O type 6 7" &
    "group      DROPLET type 4 5 6 7" &
else &
    "group      H2O type 4 5" &
    "group      DROPLET type 4 5"

## Define dynamic groups for distinguishing liquid from vapor

group       LIQUID dynamic DROPLET region REGION_LIQUID every $(v_THERMO_FREQ)
group		VAPOR dynamic H2O region REGION_VAPOR every $(v_THERMO_FREQ)

## Define computes for temperatures of specific groups

compute     TEMP_PTFE PTFE temp
compute     TEMP_LIQUID LIQUID temp
compute     TEMP_VAPOR VAPOR temp

## Dump settings

dump            DUMP_TEXT all custom $(v_DUMP_FREQ) dumps/dump_*.dump id mol type x y z
dump_modify     DUMP_TEXT sort id
# dump            DUMP_NETCDF all netcdf $(v_DUMP_FREQ) dumps/dump_*.nc id mol type x y z
# dump_modify     DUMP_NETCDF sort id

## Restart settings

restart		$(v_RESTART_FREQ) restarts/restart_*.rs

## Constraint for bond lengths

fix 		SHAKE all shake 1e-5 1000 0 m 1.0

## Thermostatting

fix         NVE_DROPLET DROPLET nve
fix		    NVT_PTFE PTFE nvt temp $(v_TEMP_K) $(v_TEMP_K) 100.0 tchain 3
velocity    H2O create $(v_TEMP_K) 2628358 dist gaussian
velocity    PTFE create $(v_TEMP_K) 2228368 dist gaussian

if "${IS_SALTED}" then &
    "velocity   CHLORINE create $(v_TEMP_K) 2248358 dist gaussian" &
    "velocity   SODIUM create $(v_TEMP_K) 2218358 dist gaussian"

## Thermodynamic output settings

thermo          $(v_THERMO_FREQ)
thermo_style    custom step time temp pe ke etotal enthalpy press vol density lx ly lz pxx pyy pzz pxy pxz pyz c_TEMP_PTFE c_TEMP_LIQUID c_TEMP_VAPOR
thermo_modify   lost ignore flush yes

## Run the simulation

# Time step size is in femtoseconds
timestep        2
run             $(v_STEPS)

## Write restart data

write_data      write_*.data
